<?xml version="1.0"?>

<aerodynamics>

    <axis name="X">

        <function name="aero/coefficient/Cx">
            <description>
               Cx coefficient in body coordinate system.
            </description>
            <product>
                <property>aero/qbar-psf</property>
                <property>metrics/Sw-sqft</property>
                <table>
                    <independentVar lookup="row">aero/alpha-deg</independentVar>
                    <independentVar lookup="column">aero/beta-deg</independentVar>
                    <independentVar lookup="table">fcs/elevator-pos-deg</independentVar>
                    <tableData breakPoint="-25.0">
       -30    -25    -20    -15    -10     -8     -6     -4     -2      0      2      4      6      8     10     15     20     25     30
-20 -.1837 -.1953 -.1904 -.1899 -.1949 -.1914 -.1872 -.1860 -.1860 -.1868 -.1899 -.1902 -.1900 -.1896 -.1883 -.1833 -.1838 -.1787 -.1771
-15 -.1714 -.1765 -.1792 -.1827 -.1816 -.1834 -.1852 -.1853 -.1877 -.1875 -.1898 -.1876 -.1868 -.1846 -.1841 -.1852 -.1817 -.1790 -.1739
-10 -.1531 -.1627 -.1692 -.1718 -.1695 -.1693 -.1707 -.1735 -.1772 -.1787 -.1769 -.1729 -.1711 -.1706 -.1698 -.1721 -.1695 -.1630 -.1534
-05 -.1151 -.1232 -.1276 -.1317 -.1390 -.1415 -.1420 -.1425 -.1437 -.1432 -.1425 -.1422 -.1410 -.1397 -.1372 -.1299 -.1258 -.1214 -.1133
 00 -.0907 -.0985 -.1043 -.1093 -.1120 -.1115 -.1122 -.1124 -.1130 -.1132 -.1129 -.1119 -.1110 -.1102 -.1092 -.1065 -.1015 -.0957 -.0879
 05 -.0514 -.0567 -.0603 -.0640 -.0653 -.0661 -.0668 -.0675 -.0690 -.0693 -.0686 -.0680 -.0664 -.0650 -.0649 -.0631 -.0594 -.0558 -.0505
 10 -.0079 -.0108 -.0099 -.0101 -.0074 -.0070 -.0078 -.0090 -.0116 -.0120 -.0123 -.0106 -.0088 -.0083 -.0080 -.0107 -.0105 -.0114 -.0085
 15 0.0354 0.0358 0.0388 0.0402 0.0477 0.0503 0.0535 0.0553 0.0538 0.0537 0.0533 0.0536 0.0527 0.0509 0.0485 0.0410 0.0396 0.0366 0.0362
 20 0.0740 0.0756 0.0746 0.0745 0.0867 0.0888 0.0924 0.0941 0.0948 0.0951 0.0975 0.0939 0.0913 0.0867 0.0824 0.0702 0.0703 0.0713 0.0697
 25 0.1092 0.1124 0.1102 0.1067 0.1101 0.1121 0.1126 0.1129 0.1123 0.1111 0.1122 0.1125 0.1136 0.1115 0.1075 0.1041 0.1076 0.1098 0.1066
 30 0.0915 0.1010 0.0975 0.1079 0.1188 0.1333 0.1399 0.1422 0.1443 0.1435 0.1431 0.1407 0.1379 0.1359 0.1323 0.1214 0.1110 0.1145 0.1050
 35 0.1079 0.1137 0.1198 0.1278 0.1402 0.1425 0.1478 0.1570 0.1623 0.1663 0.1667 0.1664 0.1637 0.1560 0.1460 0.1336 0.1256 0.1195 0.1137
 40 0.1306 0.1437 0.1350 0.1441 0.1574 0.1585 0.1601 0.1682 0.1726 0.1739 0.1711 0.1699 0.1655 0.1611 0.1567 0.1434 0.1343 0.1430 0.1299
 45 0.1535 0.1603 0.1605 0.1604 0.1637 0.1671 0.1664 0.1639 0.1674 0.1659 0.1649 0.1650 0.1625 0.1597 0.1573 0.1540 0.1541 0.1539 0.1471
 50 0.1471 0.1584 0.1646 0.1671 0.1712 0.1712 0.1676 0.1644 0.1656 0.1693 0.1714 0.1728 0.1749 0.1725 0.1730 0.1537 0.1457 0.1435 0.1362
 55 0.1554 0.1615 0.1568 0.1661 0.1778 0.1769 0.1765 0.1749 0.1762 0.1804 0.1743 0.1666 0.1677 0.1724 0.1761 0.1722 0.1347 0.1448 0.1442
 60 0.1501 0.1599 0.1647 0.1525 0.1664 0.1662 0.1794 0.1710 0.1719 0.1718 0.1728 0.1730 0.1734 0.1721 0.1688 0.1471 0.1462 0.1486 0.1460
 70 0.1501 0.1536 0.1569 0.1420 0.1573 0.1595 0.1788 0.1715 0.1738 0.1695 0.1710 0.1712 0.1730 0.1720 0.1686 0.1474 0.1567 0.1557 0.1545
 80 0.1685 0.1615 0.1559 0.1520 0.1521 0.1521 0.1535 0.1585 0.1566 0.1598 0.1573 0.1563 0.1586 0.1558 0.1572 0.1410 0.1410 0.1467 0.1538
 90 0.1712 0.1651 0.1608 0.1648 0.1676 0.1660 0.1686 0.1667 0.1669 0.1660 0.1672 0.1662 0.1664 0.1711 0.1677 0.1531 0.1493 0.1549 0.1624
                    </tableData>
                    <tableData breakPoint="-10.0">
       -30    -25    -20    -15    -10     -8     -6     -4     -2      0      2      4      6      8     10     15     20     25     30
-20 -.1362 -.1351 -.1419 -.1386 -.1374 -.1330 -.1268 -.1249 -.1222 -.1223 -.1246 -.1247 -.1252 -.1257 -.1282 -.1294 -.1327 -.1259 -.1270
-15 -.1216 -.1245 -.1235 -.1208 -.1176 -.1176 -.1170 -.1177 -.1184 -.1188 -.1185 -.1187 -.1182 -.1178 -.1184 -.1216 -.1243 -.1253 -.1224
-10 -.1018 -.1066 -.1068 -.1071 -.1061 -.1068 -.1072 -.1083 -.1094 -.1147 -.1095 -.1084 -.1077 -.1063 -.1069 -.1079 -.1076 -.1074 -.1026
-05 -.0655 -.0706 -.0746 -.0771 -.0836 -.0864 -.0876 -.0887 -.0889 -.0893 -.0885 -.0875 -.0859 -.0842 -.0812 -.0747 -.0722 -.0682 -.0631
 00 -.0483 -.0509 -.0532 -.0544 -.0578 -.0589 -.0597 -.0606 -.0613 -.0617 -.0611 -.0603 -.0595 -.0577 -.0561 -.0527 -.0515 -.0492 -.0466
 05 -.0118 -.0106 -.0096 -.0102 -.0142 -.0148 -.0155 -.0161 -.0177 -.0172 -.0178 -.0167 -.0156 -.0141 -.0133 -.0093 -.0087 -.0106 -.0127
 10 0.0268 0.0328 0.0367 0.0399 0.0412 0.0417 0.0408 0.0413 0.0406 0.0399 0.0399 0.0409 0.0415 0.0414 0.0412 0.0399 0.0367 0.0328 0.0268
 15 0.0735 0.0800 0.0887 0.0934 0.0983 0.1006 0.1024 0.1034 0.1033 0.1027 0.1031 0.1027 0.1018 0.1008 0.0983 0.0934 0.0887 0.0800 0.0735
 20 0.1222 0.1275 0.1258 0.1249 0.1326 0.1347 0.1350 0.1349 0.1325 0.1322 0.1332 0.1338 0.1343 0.1310 0.1298 0.1221 0.1230 0.1247 0.1194
 25 0.1374 0.1474 0.1466 0.1454 0.1465 0.1485 0.1485 0.1453 0.1429 0.1407 0.1418 0.1443 0.1457 0.1442 0.1439 0.1428 0.1440 0.1448 0.1348
 30 0.1056 0.1261 0.1297 0.1437 0.1500 0.1619 0.1655 0.1660 0.1663 0.1651 0.1640 0.1643 0.1624 0.1615 0.1593 0.1530 0.1390 0.1354 0.1149
 35 0.1075 0.1154 0.1299 0.1377 0.1523 0.1591 0.1722 0.1789 0.1801 0.1795 0.1793 0.1804 0.1782 0.1749 0.1675 0.1529 0.1451 0.1306 0.1227
 40 0.1335 0.1412 0.1365 0.1456 0.1597 0.1622 0.1725 0.1762 0.1798 0.1798 0.1810 0.1771 0.1710 0.1702 0.1659 0.1518 0.1427 0.1474 0.1397
 45 0.1521 0.1486 0.1517 0.1520 0.1608 0.1613 0.1597 0.1671 0.1667 0.1671 0.1664 0.1653 0.1629 0.1597 0.1569 0.1481 0.1478 0.1447 0.1482
 50 0.1346 0.1410 0.1422 0.1486 0.1561 0.1570 0.1538 0.1511 0.1515 0.1544 0.1549 0.1547 0.1560 0.1538 0.1544 0.1469 0.1405 0.1393 0.1329
 55 0.1375 0.1367 0.1251 0.1336 0.1467 0.1472 0.1475 0.1465 0.1462 0.1488 0.1433 0.1361 0.1370 0.1405 0.1431 0.1300 0.1215 0.1331 0.1339
 60 0.1316 0.1360 0.1355 0.1154 0.1285 0.1289 0.1336 0.1351 0.1372 0.1383 0.1356 0.1320 0.1387 0.1323 0.1310 0.1179 0.1380 0.1385 0.1341
 70 0.1171 0.1174 0.1185 0.1108 0.1161 0.1187 0.1376 0.1312 0.1353 0.1328 0.1301 0.1263 0.1270 0.1281 0.1268 0.1215 0.1292 0.1281 0.1278
 80 0.1201 0.1161 0.1136 0.1124 0.1158 0.1148 0.1149 0.1194 0.1177 0.1211 0.1195 0.1195 0.1225 0.1204 0.1177 0.1143 0.1155 0.1180 0.1220
 90 0.1287 0.1241 0.1214 0.1221 0.1265 0.1256 0.1257 0.1236 0.1248 0.1247 0.1262 0.1256 0.1256 0.1297 0.1257 0.1213 0.1206 0.1233 0.1279
                     </tableData>
                    <tableData breakPoint="0.0">
       -30    -25    -20    -15    -10     -8     -6     -4     -2      0      2      4      6      8     10     15     20     25     30
-20 -.1072 -.1061 -.1129 -.1096 -.1084 -.1040 -.0978 -.0959 -.0932 -.0933 -.0956 -.0957 -.0962 -.0967 -.0992 -.1004 -.1037 -.0969 -.0980
-15 -.1006 -.1035 -.1025 -.0998 -.0966 -.0966 -.0960 -.0967 -.0974 -.0978 -.0975 -.0977 -.0972 -.0968 -.0974 -.1006 -.1033 -.1043 -.1014
-10 -.0853 -.0901 -.0903 -.0906 -.0896 -.0903 -.0907 -.0918 -.0929 -.0982 -.0930 -.0919 -.0912 -.0898 -.0904 -.0914 -.0911 -.0909 -.0861
-05 -.0546 -.0597 -.0637 -.0662 -.0727 -.0755 -.0767 -.0778 -.0780 -.0784 -.0776 -.0766 -.0750 -.0733 -.0703 -.0638 -.0613 -.0573 -.0522
 00 -.0355 -.0381 -.0404 -.0416 -.0450 -.0461 -.0469 -.0478 -.0485 -.0489 -.0483 -.0475 -.0467 -.0449 -.0433 -.0399 -.0387 -.0364 -.0338
 05 -.0012 0.0000 0.0010 0.0004 -.0036 -.0042 -.0049 -.0055 -.0071 -.0066 -.0072 -.0061 -.0050 -.0035 -.0027 0.0013 0.0019 0.0000 -.0021
 10 0.0359 0.0491 0.0458 0.0490 0.0503 0.0508 0.0499 0.0509 0.0497 0.0490 0.0490 0.0500 0.0506 0.0505 0.0503 0.0490 0.0458 0.0419 0.0359
 15 0.0780 0.0845 0.0932 0.0979 0.1028 0.1051 0.1069 0.1079 0.1078 0.1072 0.1076 0.1072 0.1063 0.1053 0.1028 0.0979 0.0932 0.0845 0.0780
 20 0.1183 0.1236 0.1219 0.1210 0.1287 0.1308 0.1311 0.1310 0.1286 0.1283 0.1293 0.1299 0.1304 0.1271 0.1259 0.1182 0.1191 0.1208 0.1155
 25 0.1267 0.1367 0.1359 0.1347 0.1358 0.1378 0.1378 0.1346 0.1322 0.1300 0.1311 0.1336 0.1350 0.1335 0.1332 0.1321 0.1333 0.1341 0.1241
 30 0.0941 0.1146 0.1182 0.1322 0.1385 0.1504 0.1540 0.1545 0.1548 0.1536 0.1525 0.1528 0.1509 0.1500 0.1478 0.1415 0.1275 0.1239 0.1034
 35 0.0885 0.0964 0.1109 0.1189 0.1333 0.1391 0.1532 0.1599 0.1611 0.1605 0.1603 0.1614 0.1592 0.1559 0.1485 0.1339 0.1261 0.1116 0.1037
 40 0.1089 0.1166 0.1119 0.1210 0.1351 0.1376 0.1479 0.1516 0.1552 0.1552 0.1564 0.1525 0.1464 0.1456 0.1413 0.1272 0.1181 0.1228 0.1151
 45 0.1232 0.1197 0.1228 0.1231 0.1319 0.1324 0.1308 0.1332 0.1378 0.1382 0.1375 0.1364 0.1340 0.1380 0.1280 0.1192 0.1189 0.1158 0.1193
 50 0.1135 0.1185 0.1184 0.1171 0.1243 0.1279 0.1279 0.1258 0.1257 0.1281 0.1258 0.1228 0.1221 0.1186 0.1180 0.1108 0.1121 0.1122 0.1072
 55 0.1137 0.1195 0.1146 0.1161 0.1209 0.1211 0.1211 0.1195 0.1183 0.1200 0.1185 0.1153 0.1160 0.1152 0.1135 0.1087 0.1072 0.1121 0.1063
 60 0.1037 0.1090 0.1094 0.1049 0.1109 0.1123 0.1181 0.1184 0.1170 0.1147 0.1141 0.1126 0.1129 0.1129 0.1109 0.1049 0.1094 0.1090 0.1037
 70 0.0857 0.0858 0.0857 0.0796 0.0851 0.0919 0.1150 0.1087 0.1089 0.1025 0.1022 0.1007 0.1012 0.0994 0.0952 0.0897 0.0958 0.0959 0.0958
 80 0.0842 0.0807 0.0787 0.0778 0.0791 0.0793 0.0805 0.0846 0.0808 0.0821 0.0802 0.0799 0.0826 0.0800 0.0709 0.0756 0.0765 0.0785 0.0820
 90 0.0847 0.0813 0.0798 0.0824 0.0843 0.0843 0.0853 0.0841 0.0858 0.0864 0.0857 0.0828 0.0817 0.0857 0.0816 0.0797 0.0771 0.0786 0.0820
                    </tableData>
                    <tableData breakPoint="10.0">
       -30    -25    -20    -15    -10     -8     -6     -4     -2      0      2      4      6      8     10     15     20     25     30
-20 -.1023 -.1012 -.1080 -.1047 -.1035 -.0991 -.0929 -.0910 -.0884 -.0884 -.0907 -.0908 -.0913 -.0918 -.0943 -.0955 -.0988 -.0920 -.0931
-15 -.1038 -.1067 -.1057 -.1030 -.0998 -.0988 -.0992 -.0999 -.1006 -.1010 -.1007 -.1009 -.1004 -.1000 -.1006 -.1038 -.1065 -.1075 -.1046
-10 -.0963 -.1011 -.1013 -.1016 -.1006 -.1013 -.1017 -.1028 -.1039 -.1092 -.1040 -.1029 -.1022 -.1008 -.1014 -.1024 -.1021 -.1019 -.0971
-05 -.0664 -.0715 -.0755 -.0780 -.0845 -.0873 -.0885 -.0896 -.0898 -.0902 -.0894 -.0884 -.0868 -.0851 -.0821 -.0756 -.0731 -.0691 -.0640
 00 -.0472 -.0498 -.0521 -.0533 -.0567 -.0578 -.0586 -.0595 -.0602 -.0606 -.0600 -.0592 -.0584 -.0566 -.0550 -.0516 -.0504 -.0481 -.0455
 05 -.0146 -.0134 -.0124 -.0130 -.0170 -.0176 -.0183 -.0189 -.0205 -.0200 -.0206 -.0195 -.0184 -.0169 -.0161 -.0121 -.0115 -.0134 -.0155
 10 0.0182 0.0242 0.0281 0.0313 0.0326 0.0331 0.0322 0.0327 0.0320 0.0313 0.0313 0.0323 0.0329 0.0328 0.0326 0.0313 0.0281 0.0242 0.0182
 15 0.0537 0.0602 0.0689 0.0736 0.0785 0.0808 0.0826 0.0836 0.0835 0.0829 0.0833 0.0829 0.0820 0.0810 0.0785 0.0736 0.0689 0.0602 0.0537
 20 0.0871 0.0924 0.0907 0.0898 0.0975 0.0996 0.0999 0.0998 0.0974 0.0971 0.0981 0.0987 0.0992 0.0959 0.0947 0.0870 0.0879 0.0896 0.0843
 25 0.0916 0.1016 0.1008 0.0996 0.1007 0.1027 0.1027 0.0995 0.0971 0.0949 0.0960 0.0985 0.0999 0.0984 0.0981 0.0970 0.0982 0.0990 0.0890
 30 0.0509 0.0714 0.0750 0.0890 0.0953 0.1072 0.1108 0.1113 0.1116 0.1104 0.1093 0.1096 0.1077 0.1068 0.1046 0.0983 0.0843 0.0807 0.0602
 35 0.0481 0.0560 0.0705 0.0783 0.0929 0.0987 0.1128 0.1195 0.1207 0.1201 0.1199 0.1210 0.1188 0.1155 0.1081 0.0935 0.0857 0.0712 0.0633
 40 0.0664 0.0741 0.0694 0.0785 0.0926 0.0951 0.1054 0.1091 0.1127 0.1127 0.1139 0.1100 0.1039 0.1031 0.0988 0.0847 0.0756 0.0803 0.0726
 45 0.0846 0.0811 0.0842 0.0845 0.0933 0.0938 0.0922 0.0946 0.0992 0.0996 0.0989 0.0978 0.0954 0.0922 0.0894 0.0806 0.0803 0.0772 0.0807
 50 0.0908 0.0985 0.1011 0.0999 0.1063 0.1061 0.1018 0.0996 0.1021 0.1071 0.1071 0.1064 0.1070 0.1036 0.1032 0.0968 0.0980 0.0954 0.0877
 55 0.0842 0.0869 0.0790 0.0882 0.1025 0.1010 0.0993 0.0980 0.0991 0.1030 0.0972 0.0897 0.0914 0.0969 0.1015 0.0872 0.0780 0.0859 0.0832
 60 0.0749 0.0823 0.0849 0.0794 0.0831 0.0841 0.0896 0.0908 0.0915 0.0914 0.0908 0.0893 0.0895 0.0889 0.0868 0.0831 0.0886 0.0860 0.0786
 70 0.0504 0.0500 0.0504 0.0467 0.0813 0.0811 0.0972 0.0950 0.1075 0.1190 0.1101 0.1001 0.0967 0.0958 0.0931 0.0585 0.0622 0.0618 0.0622
 80 0.0421 0.0380 0.0355 0.0397 0.0420 0.0417 0.0424 0.0478 0.0473 0.0519 0.0484 0.0465 0.0489 0.0472 0.0450 0.0427 0.0385 0.0410 0.0451
 90 0.0433 0.0404 0.0395 0.0467 0.0495 0.0492 0.0499 0.0484 0.0500 0.0504 0.0495 0.0463 0.0457 0.0510 0.0482 0.0454 0.0382 0.0391 0.0420
                    </tableData>
                    <tableData breakPoint="25.0">
       -30    -25    -20    -15    -10     -8     -6     -4     -2      0      2      4      6      8     10     15     20     25     30
-20 -.1068 -.1102 -.1160 -.1176 -.1291 -.1289 -.1244 -.1158 -.1137 -.1141 -.1164 -.1192 -.1200 -.1240 -.1243 -.1128 -.1112 -.1054 -.1020
-15 -.1122 -.1180 -.1227 -.1292 -.1365 -.1397 -.1406 -.1416 -.1442 -.1450 -.1448 -.1428 -.1408 -.1440 -.1397 -.1324 -.1259 -.1212 -.1154
-10 -.1102 -.1212 -.1319 -.1359 -.1403 -.1427 -.1454 -.1480 -.1520 -.1633 -.1518 -.1482 -.1457 -.1438 -.1419 -.1375 -.1335 -.1228 -.1118
-05 -.0911 -.1027 -.1093 -.1144 -.1244 -.1304 -.1316 -.1320 -.1333 -.1337 -.1340 -.1322 -.1309 -.1280 -.1243 -.1143 -.1092 -.1026 -.0910
 00 -.0811 -.0889 -.0955 -.0996 -.1015 -.1037 -.1056 -.1065 -.1077 -.1075 -.1072 -.1061 -.1045 -.1024 -.1003 -.0984 -.0943 -.0877 -.0799
 05 -.0575 -.0588 -.0631 -.0676 -.0671 -.0694 -.0715 -.0739 -.0775 -.0785 -.0787 -.0744 -.0704 -.0688 -.0669 -.0674 -.0624 -.0586 -.0573
 10 -.0183 -.0188 -.0211 -.0241 -.0226 -.0254 -.0291 -.0333 -.0370 -.0336 -.0345 -.0326 -.0283 -.0247 -.0236 -.0251 -.0221 -.0198 -.0193
 15 0.0195 0.0186 0.0204 0.0186 0.0194 0.1081 0.0154 0.0162 0.0198 0.0212 0.0157 0.0131 0.0136 0.0158 0.0179 0.0171 0.0189 0.0171 0.0180
 20 0.0494 0.0626 0.0562 0.0477 0.0323 0.0279 0.0289 0.0263 0.0204 0.0187 0.0173 0.0255 0.0183 0.0165 0.0119 0.0273 0.0358 0.0422 0.0290
 25 0.0699 0.0695 0.0627 0.0557 0.0366 0.0316 0.0263 0.0207 0.0160 0.0198 0.0165 0.0218 0.0244 0.0228 0.0214 0.0405 0.0475 0.0543 0.0547
 30 0.0207 0.0324 0.0323 0.0293 0.0304 0.0404 0.0419 0.0404 0.0385 0.0381 0.0374 0.0379 0.0389 0.0417 0.0446 0.0435 0.0465 0.0466 0.0349
 35 0.0211 0.0282 0.0309 0.0263 0.0307 0.0334 0.0437 0.0466 0.0458 0.0479 0.0495 0.0495 0.0487 0.0467 0.0434 0.0390 0.0435 0.0409 0.0338
 40 0.0386 0.0462 0.0331 0.0339 0.0365 0.0407 0.0394 0.0411 0.0407 0.0418 0.0413 0.0426 0.0392 0.0405 0.0381 0.0355 0.0347 0.0478 0.0402
 45 0.0460 0.0438 0.0341 0.0311 0.0348 0.0373 0.0362 0.0335 0.0338 0.0363 0.0325 0.0340 0.0342 0.0356 0.0338 0.0301 0.0331 0.0428 0.0450
 50 0.0394 0.0479 0.0513 0.0447 0.0538 0.0528 0.0483 0.0441 0.0444 0.0472 0.0488 0.0497 0.0507 0.0487 0.0495 0.0478 0.0525 0.0476 0.0376
 55 0.0336 0.0411 0.0380 0.0471 0.0543 0.0508 0.0471 0.0445 0.0450 0.0484 0.0442 0.0383 0.0410 0.0471 0.0522 0.0432 0.0272 0.0347 0.0315
 60 0.0158 0.0284 0.0361 0.0335 0.0487 0.0443 0.0442 0.0432 0.0451 0.0460 0.0451 0.0433 0.0435 0.0438 0.0416 0.0363 0.0397 0.0340 0.0246
 70 -.0186 -.0121 -.0057 -.0070 0.0410 0.0451 0.0655 0.0604 0.0655 0.0641 0.0677 0.0701 0.0702 0.0636 0.0546 0.0033 0.0020 -.0005 0.0058
 80 -.0242 -.0267 -.0277 -.0200 -.0215 -.0224 -.0223 -.0180 -.0202 -.0173 -.0046 0.0281 0.0311 0.0053 -.0210 -.0288 -.0312 -.0240 -.0152
 90 -.0208 -.0271 -.0315 -.0229 -.0156 -.0165 -.0141 -.0184 -.0173 -.0173 -.0168 -.0185 -.0183 -.0130 -.0157 -.0237 -.0323 -.0246 -.0150
                     </tableData>
                </table>
            </product>
        </function>

        <function name="aero/coefficient/Cx_lef">
            <description>
               Cx due to leading edge flaps coefficient.
            </description>
            <product>
                <property>aero/qbar-psf</property>
                <property>metrics/Sw-sqft</property>
                <property>fcs/lef-norm</property>
                <table>
                    <independentVar lookup="row">aero/alpha-deg</independentVar>
                    <independentVar lookup="column">aero/beta-deg</independentVar>
                    <tableData>
       -30    -25    -20    -15    -10     -8     -6     -4     -2      0      2      4      6      8     10     15     20     25     30
-20
-15
-10
-05
 00
 05
 10
 15
 20
 25
 30
 35
 40
 45
                     </tableData>
                </table>
            </product>
        </function>

        <function name="aero/coefficient/Cx_sb">
            <description>
               Cx due speed brake coefficient.
            </description>
            <product>
                <property>aero/qbar-psf</property>
                <property>metrics/Sw-sqft</property>
                <property>fcs/sb-norm</property>
                <table>
                    <independentVar lookup="row">aero/alpha-deg</independentVar>
                    <tableData>
-20 -.0101
-15 -.0101
-10 -.0101
-05 -.0101
 00 -.0101
 05 -.0358
 10 -.0790
 15 -.1227
 20 -.1827
 25 -.1892
 30 -.1988
 35 -.2000
 40 -.1874
 45 -.1673
 50 -.1476
 55 -.1310
 60 -.1279
 70 -.1325
 80 -.1250
 90 -.1250
                     </tableData>
                </table>
            </product>
        </function>

        <function name="aero/coefficient/Cx_q">
            <description>
               Cx due to pitch rate coefficient.
            </description>
            <product>
                <property>aero/qbar-psf</property>
                <property>metrics/Sw-sqft</property>
                <property>aero/ci2vel</property>
                <property>velocities/q-rad_sec</property>
                <table>
                    <independentVar lookup="row">aero/alpha-deg</independentVar>
                    <tableData>
-20 .953
-15 .953
-10 .953
-05 1.55
 00 1.90
 05 2.46
 10 2.92
 15 3.30
 20 2.76
 25 2.05
 30 1.50
 35 1.49
 40 1.83
 45 1.21
 50 1.33
 55 1.61
 60 .910
 70 3.43
 80 .617
 90 .273
                    </tableData>
                </table>
            </product>
        </function>

        <function name="aero/coefficient/Cx_q-lef">
            <description>
               Cx due to pitch rate due to leading edge flaps coefficient.
            </description>
            <product>
                <property>aero/qbar-psf</property>
                <property>metrics/Sw-sqft</property>
                <property>aero/ci2vel</property>
                <property>velocities/q-rad_sec</property>
                <property>fcs/lef-norm</property>
                <table>
                    <independentVar lookup="row">aero/alpha-deg</independentVar>
                    <tableData>
-20 -1.22
-15 -1.22
-10 -1.22
-05 -1.66
 00 -1.62
 05 -1.58
 10 -1.96
 15 -2.51
 20 -2.04
 25 -1.64
 30 -.824
 35 -.817
 40 -1.10
 45 -.550
                     </tableData>
                </table>
            </product>
        </function>

    </axis>

       -30    -25    -20    -15    -10     -8     -6     -4     -2      0      2      4      6      8     10     15     20     25     30
-20
-15
-10
-05
 00
 05
 10
 15
 20
 25
 30
 35
 40
 45
 50
 55
 60
 70
 80
 90
                     </tableData>

</aerodynamics>
